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/batch
! ANSYS input file written by Workbench version 2021 R1
! File used for geometry attach: C:\Users\LUCIO PASSOS\Dropbox\websiteaula\CFD\Ansys\ap20220117_files\dp0\SYS\DM\SYS.agdb
/title,ap20220117--Steady-State Thermal (A5)
/com,--- Data in consistent MKS units. See Solving Units in the help system for more information.
/units,MKS
/prep7
! Turn off shape checking because checks already performed inside WB mesher.
! See help system for more information.
SHPP,OFF,,NOWARN
etcon,set             ! allow ANSYS to choose best KEYOP's for 180x elements, resets any applicable keyopt to MAPDL defaults
/com,*********** Nodes for the whole assembly ***********
nblock,3,,8454
(1i9,3e20.9e3)
        1     9.500000000E-01     5.000000000E-02     5.000000000E-02
        2     9.500000000E-01     5.000000000E-02     1.000000000E-01
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-1
/com,*********** Elements for Body 1 "Solid" ***********
et,1,278
eblock,19,solid,,6000
(19i9)
        1        1        1        1        0        0        0        0        8        0        1        1     7292     7288     7192     5605     7528     7287     7286
        1        1        1        1        0        0        0        0        8        0        2        1     7192     7288     7292        2     7211     7289     7293
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-1
/com,*********** Send User Defined Coordinate System(s) ***********
csys,0
toffst,273.15,  ! Temperature offset from absolute zero
/com,*********** Send Materials ***********
Temperature = 'TEMP' ! Temperature
MP,DENS,1,2300,	! kg m^-3
MP,ALPX,1,1.4e-05,	! C^-1
MP,C,1,780,	! J kg^-1 C^-1
MP,KXX,1,0.72,	! W m^-1 C^-1
MP,EX,1,30000000000,	! Pa
MP,NUXY,1,0.18,

!************************* Model Summary ********************
!Solid,	Concrete,	matid,	1
!************************* End Model Summary ********************
/com,*********** Send Named Selection as Node Component ***********
CMBLOCK,FACE_SUPERIOR,NODE,      126
(8i10)
      6727      6728      6729      6730      6731      6732      6733      6734
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/com,*********** Send Named Selection as Node Component ***********
CMBLOCK,FACE_LATERAL1,NODE,      366
(8i10)
      6746      6747      6748      6749      6750      6751      6752      6753
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/com,*********** Send Named Selection as Node Component ***********
CMBLOCK,FACE_LATERAL2,NODE,      366
(8i10)
      6826      6827      6828      6829      6830      6831      6832      6833
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/com,*********** Send Named Selection as Node Component ***********
CMBLOCK,FACE_INFERIOR,NODE,      126
(8i10)
      6806      6807      6808      6809      6810      6811      6812      6813
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/com,*********** Send Named Selection as Node Component ***********
CMBLOCK,FACE_ENTRADA,NODE,     1281
(8i10)
      5606      5607      5608      5609      5610      5611      5612      5613
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/com,*********** Send Named Selection as Node Component ***********
CMBLOCK,FACE_SAIDA,NODE,     1281
(8i10)
      4485      4486      4487      4488      4489      4490      4491      4492
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/com,*********** Define Temperature Constraint ***********
CMBLOCK,_CM46   ,NODE,     1281
(8i10)
      5606      5607      5608      5609      5610      5611      5612      5613
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/com,*********** Define Temperature Constraint ***********
CMBLOCK,_CM48   ,NODE,     1281
(8i10)
      4485      4486      4487      4488      4489      4490      4491      4492
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fcum,add                   ! add nodal forces up (needed in case have loads on the same edge,vertex)
fcum                       ! reset default on fcum command since done sending WB F loads
/com,***************** Define Uniform Initial temperature ***************
tunif,22.
fini
/com,****************************************************************************
/com,*************************    SOLUTION       ********************************
/com,****************************************************************************
/solu
antype,0                   ! static analysis
!eqsl,sparse               ! using sparse solver which is default so no eqsl command needed
cntr,print,1               ! print out contact info and also make no initial contact an error
rescontrol,,none                 ! Do not keep any restart files
dmpoption,emat,no             ! Don't combine emat file for DANSYS
dmpoption,esav,no             ! Don't combine esav file for DANSYS
/com,****************************************************
/com,******************* SOLVE FOR LS 1 OF 1 ****************
d,_CM46,temp,100.
d,_CM48,temp,0.
autots,on
nsub,1,10,1
time,1.
outres,erase
outres,all,none
outres,nsol,all
outres,rsol,all
outres,eangl,all
outres,veng,all
outres,fflux,all
outres,cont,all
cnvtol,heat,,.001,,1.e-006    ! Program Controlled. Set MINREF equivalent of 1e-6 Watts
! *********** WB SOLVE COMMAND ***********
! check interactive state
*get,ANSINTER_,active,,int
*if,ANSINTER_,ne,0,then
/eof
*endif
solve
/com *************** Write FE CONNECTORS *********
CEWRITE,file,ce,,INTE
/com,****************************************************
/com,*************** FINISHED SOLVE FOR LS 1 *************
/post1
fini
